*Heading
** Job name: kirigami_magnetic_sheet_d11_t015_m03_0604 Model name: Model-5
** Generated by: Abaqus/CAE 2022
*Preprint, echo=NO, model=NO, history=NO, contact=NO
**
** PARTS
**
*Part, name=kirigami_0604
*Node
      1,         -33.,   20.1971016, -0.150000006
      2,         -33.,    19.594202, -0.150000006
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*Element, type=C3D6
    1,  1996,  3645,   373, 13521, 15170, 11898
    2,   373,   372,  7224, 11898, 11897, 18749
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*End Part
**
**
** ASSEMBLY
**
*Assembly, name=Assembly
**
*Instance, name=kirigami_0604-1, part=kirigami_0604
*End Instance
**
*End Assembly
**
** MATERIALS
**
*Material, name="dragon skin"
*Elastic
 0.876, 0.36
** ----------------------------------------------------------------
**
** STEP: Step-1
**
*Step, name=Step-1, nlgeom=NO
*Static
1., 1., 1e-05, 1.
**
** BOUNDARY CONDITIONS
**
** Name: BC-1 Type: Displacement/Rotation
*Boundary
Set-1, 1, 1
Set-1, 2, 2
Set-1, 3, 3, 0.01
Set-1, 4, 4
Set-1, 5, 5
Set-1, 6, 6
** Name: BC-2 Type: Displacement/Rotation
*Boundary
Set-2, 1, 1
Set-2, 2, 2
Set-2, 3, 3, 0.01
Set-2, 4, 4
Set-2, 5, 5
Set-2, 6, 6
** Name: BC-3 Type: Symmetry/Antisymmetry/Encastre
*Boundary
Set-3, ENCASTRE
** Name: BC-4 Type: Symmetry/Antisymmetry/Encastre
*Boundary
Set-4, ENCASTRE
** Name: BC-5 Type: Symmetry/Antisymmetry/Encastre
*Boundary
Set-5, ENCASTRE
** Name: BC-6 Type: Symmetry/Antisymmetry/Encastre
*Boundary
Set-7, ENCASTRE
**
** OUTPUT REQUESTS
**
*Restart, write, frequency=0
*node file
u
**
** FIELD OUTPUT: F-Output-1
**
*Output, field, variable=PRESELECT
**
** HISTORY OUTPUT: H-Output-1
**
*Output, history, variable=PRESELECT
*End Step
